*Heading
** Job name: PseudoCoupling Model name: Model-1
** Generated by: Abaqus/CAE 2019
*Preprint, echo=NO, model=NO, history=NO, contact=NO
**
** PARTS
**
*Part, name=Part
*End Part
**
**
** ASSEMBLY
**
*Assembly, name=Assembly
**
*Instance, name=Part-1, part=Part
*Node
      1,          43.,          80.
      2,          43.,          76.
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*Element, type=CPE4P
  1,   1,  13, 485,  90
  2,  13,  14, 486, 485
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*Nset, nset=All, generate
    1,  6561,     1
*Elset, elset=All, generate
    1,  6400,     1
*Nset, nset=A
    7,    8,   11,   12,  102,  103
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*Elset, elset=A, generate
 3361,  6400,     1
*Nset, nset=B
    2,    3,    6,    7,    8,    9
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*Elset, elset=B, generate
  169,  3208,     1
*Nset, nset=C
    1,    2,    3,    4,    5,    6
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*Elset, elset=C
    1,    2,    3,    4,    5,    6
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*Nset, nset=D
   1,   2,   5,   6,  13,  14
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*Elset, elset=D, generate
 149,  168,    1
** Section: Section-C
*Solid Section, elset=C, material=Material-C
,
** Section: Section-D
*Solid Section, elset=D, material=Material-D
,
** Section: Section-B
*Solid Section, elset=B, material=Material-B
,
** Section: Section-A
*Solid Section, elset=A, material=Material-A
,
*End Instance
**
*Nset, nset=Pickup_A, instance=Part-1
 3718, 3756, 3796, 5020, 6483, 6521, 6561
*Nset, nset=Pickup_B, instance=Part-1
  684,  724,  762, 2146, 3370, 3410, 3448
*Nset, nset=Pickup_C, instance=Part-1
  489,  537,  591, 3532, 3583, 3637
*Nset, nset=Pickup_D, instance=Part-1
 593, 595, 597, 600, 602, 604
*Nset, nset=Pickup_all, instance=Part-1
   93,  408,  599,  600,  644, 2066, 3488, 3678, 5100
*Nset, nset=_PickedSet16, internal, instance=Part-1
   3,   4,   7,   8,   9,  10
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*Elset, elset=_PickedSet16, internal, instance=Part-1
  145,  146,  147,  148,  169,  248
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*Nset, nset=_PickedSet17, internal, instance=Part-1
  11,  12, 369, 370, 371, 372
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*Elset, elset=_PickedSet17, internal, instance=Part-1, generate
 6321,  6400,     1
*Elset, elset=_Top_S4, internal, instance=Part-1, generate
   1,  145,    4
*Elset, elset=_Top_S2, internal, instance=Part-1
  152,  156,  160,  164,  168, 3212
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*Surface, type=ELEMENT, name=Top
_Top_S4, S4
_Top_S2, S2
**
** Nset_python_fill_in_placeholder
**
*End Assembly
**
** MATERIALS
**
*Material, name=Material-A
*Density
2039.,
*Elastic
 2e+09, 0.3
*Permeability, specific=10000.
 1e-07, 0.111
*Material, name=Material-B
*Density
2039.,
*Elastic
 2e+09, 0.3
*Permeability, specific=10000.
 1e-05, 0.22
*Material, name=Material-C
*Density
2039.,
*Elastic
 2e+09, 0.3
*Permeability, specific=10000.
 1e-12, 0.00001
*Material, name=Material-D
*Density
2039.,
*Elastic
 2e+09, 0.3
*Permeability, specific=10000.
 0.0001,1.
**
** BOUNDARY CONDITIONS
**
** Name: BC_x Type: Displacement/Rotation
*Boundary
_PickedSet16, 1, 1
** Name: BC_y Type: Displacement/Rotation
*Boundary
_PickedSet17, 2, 2
**
** PREDEFINED FIELDS
**
** Name: PreDef_EP   Type: Geostatic stress
*Initial Conditions, type=STRESS, GEOSTATIC
Part-1.All, -2.81e+07, 80., -2.82e+07, 0., 0.5, 0.5
** Name: PreDef_PP   Type: Pore pressure
*Initial Conditions, TYPE=PORE PRESSURE
Part-1.All, 7.19e+07
** Name: PreDef_VR-A   Type: Void ratio
*Initial Conditions, TYPE=RATIO
Part-1.A, 0.111
** Name: PreDef_VR-B   Type: Void ratio
*Initial Conditions, TYPE=RATIO
Part-1.B, 0.22
** Name: PreDef_VR-C   Type: Void ratio
*Initial Conditions, TYPE=RATIO
Part-1.C, 0.00001
** Name: PreDef_VR-D   Type: Void ratio
*Initial Conditions, TYPE=RATIO
Part-1.D, 1.
** ----------------------------------------------------------------
** restart_point_python_placeholder
**
** STEP: Geostatic
**
*Step, name=Geostatic, nlgeom=NO
*Geostatic, utol
1., 1., 1e-05, 1.
**
** BOUNDARY CONDITIONS
**
** bc_python_fill_in_placeholder
**
**
** LOADS
**
** Name: Gravity   Type: Gravity
*Dload
, GRAV, 9.81, 0., -1.
** Name: Overburden   Type: Pressure
*Dsload
Top, P, 1e+08
**
** OUTPUT REQUESTS
**
*Restart, write, frequency=1
**
** FIELD OUTPUT: F-Output-1
**
*Output, field
*Node Output
CF, COORD, POR, RF, U
*Element Output, directions=YES
FLUVR, LE, S, SAT, VOIDR
*Contact Output
CDISP, CSTRESS, PFL
**
** HISTORY OUTPUT: H-Output-1
**
*Output, history, variable=PRESELECT
*EL FILE, frequency=10000
COORD, VOIDR, POR
*NODE FILE
COORD
*End Step
